// SBML level 3 version 1

model Model_layout()

  // Compartments:
  compartment _compartment_default_;
  compartment s_id_cg_comp_0;
  compartment default;

  // Species:
  species s_id_sg_CP__sa7707 in s_id_cg_comp_0 = 1;
  species s_id_sg_YP__sa7682 in s_id_cg_comp_0 = 1;
  species s_id_sg_C2__sa7658 in s_id_cg_comp_0 = 1;
  species s_id_sg_Y__sa1950 in s_id_cg_comp_0 = 1;
  species s_id_sg_M__sa7664 in s_id_cg_comp_0 = 1;
  species s_id_sg_YT in s_id_cg_comp_0 = 1;
  species s_id_sg_EmptySet__sa7700 in s_id_cg_comp_0 = 1;
  species s_id_sg_Reaction9_CT in s_id_cg_comp_0 = 1;
  species s_id_sg_pM__Reaction4__Reaction5 in s_id_cg_comp_0 = 1;

  // Parameters:
  E0 = 0.1;
  k0 = 0.1;
  E1 = 0.1;
  k1 = 0.1;
  E2 = 0.1;
  k2 = 0.1;
  E3 = 0.1;
  k3 = 0.1;
  E4 = 0.1;
  k4 = 0.1;
  E5 = 0.1;
  k5 = 0.1;
  E6 = 0.1;
  k6 = 0.1;
  E7 = 0.1;
  k7 = 0.1;
  E8 = 0.1;
  k8 = 0.1;

  // Reactions:
  reaction_glyph_0__rg_Reaction2: s_id_sg_C2__sa7658 => s_id_sg_CP__sa7707; E0*k0*s_id_sg_C2__sa7658;
  reaction_glyph_2__rg_Reaction4: s_id_sg_CP__sa7707 + s_id_sg_Y__sa1950 => s_id_sg_pM__Reaction4__Reaction5; E1*k1*s_id_sg_CP__sa7707*s_id_sg_Y__sa1950;
  reaction_glyph_8__rg_Reaction6: s_id_sg_EmptySet__sa7700 => s_id_sg_Y__sa1950; E2*k2*s_id_sg_EmptySet__sa7700;
  reaction_glyph_5__rg_Reaction7: s_id_sg_Y__sa1950 => s_id_sg_EmptySet__sa7700; E3*k3*s_id_sg_Y__sa1950;
  reaction_glyph_4__rg_Reaction5: s_id_sg_M__sa7664 => s_id_sg_pM__Reaction4__Reaction5; E4*k4*s_id_sg_M__sa7664;
  reaction_glyph_1__rg_Reaction3: s_id_sg_CP__sa7707 => s_id_sg_C2__sa7658; E5*k5*s_id_sg_CP__sa7707;
  reaction_glyph_3__rg_Reaction1: s_id_sg_M__sa7664 => s_id_sg_C2__sa7658 + s_id_sg_YP__sa7682; E6*k6*s_id_sg_M__sa7664;
  reaction_glyph_7__rg_Reaction8: s_id_sg_YP__sa7682 => s_id_sg_EmptySet__sa7700; E7*k7*s_id_sg_YP__sa7682;
  reaction_glyph_6__rg_Reaction9: s_id_sg_pM__Reaction4__Reaction5 => s_id_sg_M__sa7664; E8*k8*s_id_sg_pM__Reaction4__Reaction5;  // modifiers: s_id_sg_Reaction9_CT
end
