// SBML level 3 version 1

model SBMLDiagrams_model()

  // Compartments:
  compartment _compartment_default_;
  compartment City;

  // Species:
  species Susceptible in City = 9979999;
  species Exposed in City = 20000;
  species Infected in City = 1;
  species Total_population in City = 10000000;
  species Recovered in City = 0;
  species Deceased in City = 0;

  // Parameters:
  E0 = 0.1;
  k0 = 0.1;
  E1 = 0.1;
  k1 = 0.1;
  E2 = 0.1;
  k2 = 0.1;
  E3 = 0.1;
  k3 = 0.1;

  // Reactions:
  Susceptible_to_Exposed: Susceptible => Exposed; E0*k0*Susceptible;  // modifiers: Infected, Total_population
  Exposed_to_Infected: Exposed => Infected; E1*k1*Exposed;
  Infected_to_Recovered: Infected => Recovered; E2*k2*Infected;
  Infected_to_Deceased: Infected => Deceased; E3*k3*Infected;
end
