// SBML level 3 version 1

model SBMLDiagrams_model()

  // Compartments:
  compartment _compartment_default_;
  compartment compartment;

  // Species:
  species Gp in compartment = 1;
  species A in compartment = 1;
  species Gi in compartment = 1;
  species B in compartment = 100000000000;

  // Parameters:
  E0 = 0.1;
  k0 = 0.1;
  E1 = 0.1;
  k1 = 0.1;
  E2 = 0.1;
  k2 = 0.1;
  E3 = 0.1;
  k3 = 0.1;
  E4 = 0.1;
  k4 = 0.1;

  // Reactions:
  The_uptake_of_glutamate_and_Consumption_of_glutamate_and_ammonia: => Gp; E0*k0;  // modifiers: A
  Diffusion_of_glutamate: Gp => Gi; E1*k1*Gp;
  Consumption_of_glutamate_to_produce_ammonia: Gi => A; E2*k2*Gi;
  Diffusion_of_ammonia: A => ; E3*k3*A;
  The_synthesis_of_biomass_from_ammonia_and_glutamate: => B; E4*k4;  // modifiers: A, Gp
end
