// SBML level 3 version 1

model Model_layout()

  // Compartments:
  compartment _compartment_default_;
  compartment compartment;

  // Species:
  species $External_glucose in compartment = 0;
  species Glucose in compartment = 0;
  species ATP in compartment = 3;
  species fructose_1_6_bisphosphate in compartment = 0;
  species ADP in compartment = 1;
  species glyceraldehyde_3_phosphate in compartment = 0;
  species NADH in compartment = 0.5;
  species NAD in compartment = 0.5;
  species $Glycerol in compartment = 0;
  species glycerate_3_phosphate in compartment = 0;
  species pyruvate in compartment = 0;
  species Acetyladehyde in compartment = 0;
  species $ethanol in compartment = 0;
  species External_acetaldehyde in compartment = 0;
  species $Sink in compartment = 0;

  // Parameters:
  J0_inputFlux = 0.1;
  J1_k1 = 0.1;
  pow = 0.1;
  J1_Ki = 0.1;
  J1_n = 0.1;
  J2_J2_k = 0.1;
  J3_J3_k = 0.1;
  J4_kg = 0.1;
  J4_kp = 0.1;
  J4_ka = 0.1;
  J4_kk = 0.1;
  J5_J5_k = 0.1;
  J6_J6_k = 0.1;
  J7_J7_k = 0.1;
  J8_J8_k1 = 0.1;
  J8_J8_k2 = 0.1;
  J9_J9_k = 0.1;
  J10_J10_k = 0.1;

  // Reactions:
  J0: $External_glucose -> Glucose; J0_inputFlux;
  J1: Glucose + ATP -> fructose_1_6_bisphosphate + ADP; J1_k1*Glucose*ATP*(1/(1 + (ATP/J1_Ki)^J1_n));
  J2: fructose_1_6_bisphosphate -> glyceraldehyde_3_phosphate; J2_J2_k*fructose_1_6_bisphosphate;
  J3: glyceraldehyde_3_phosphate + NADH -> NAD + $Glycerol; J3_J3_k*glyceraldehyde_3_phosphate*NADH;
  J4: glyceraldehyde_3_phosphate + ADP + NAD -> ATP + glycerate_3_phosphate + NADH; (J4_kg*J4_kp*glyceraldehyde_3_phosphate*NAD*ADP - J4_ka*J4_kk*glycerate_3_phosphate*ATP*NADH)/(J4_ka*NADH + J4_kp*ADP);
  J5: glycerate_3_phosphate + ADP -> ATP + pyruvate; J5_J5_k*glycerate_3_phosphate*ADP;
  J6: pyruvate -> Acetyladehyde; J6_J6_k*pyruvate;
  J7: Acetyladehyde + NADH -> NAD + $ethanol; J7_J7_k*Acetyladehyde*NADH;
  J8: Acetyladehyde -> External_acetaldehyde; J8_J8_k1*Acetyladehyde - J8_J8_k2*External_acetaldehyde;
  J9: ATP -> ADP; J9_J9_k*ATP;
  J10: External_acetaldehyde -> $Sink; J10_J10_k*External_acetaldehyde;
end
