// SBML level 3 version 1

function Function_for_J1(J1_k3, S1, compartment_)
  J1_k3*S1/compartment_;
end

function Function_for_J2(J2_c, J2_k1, J2_k_1, J2_q, S1, S2, compartment_)
  (J2_k1*S1 - J2_k_1*S2)*(1 + J2_c*S2^J2_q)/compartment_;
end

function Function_for_J0(J0_v0, compartment_)
  J0_v0/compartment_;
end

function Function_for_J3(J3_k2, S2, compartment_)
  J3_k2*S2/compartment_;
end

model oscli()
  // Oscli (Heinrich model)
  // model units - substance: substance, time: time, volume: volume, area: area, length: length, extent: substance

  // Compartments:
  compartment compartment_ = 1 volume;

  // Species:
  species S1 in compartment_ = 0;
  species S2 in compartment_ = 1;
  species $X0 in compartment_ = 1;
  species $X1 in compartment_ = 0;
  species $X2 in compartment_ = 0;

  // Parameters:
  J0_v0 = 8;
  J1_k3 = 0;
  J2_k1 = 1;
  J2_k_1 = 0;
  J2_c = 1;
  J2_q = 3;
  J3_k2 = 5;

  // Reactions:
  J0: $X0 => S1; compartment_*Function_for_J0(J0_v0, compartment_);
  J1: S1 => $X1; compartment_*Function_for_J1(J1_k3, S1, compartment_);
  J2: S1 => S2; compartment_*Function_for_J2(J2_c, J2_k1, J2_k_1, J2_q, S1, S2, compartment_);
  J3: S2 => $X2; compartment_*Function_for_J3(J3_k2, S2, compartment_);

  // Unit definitions:
  unit length = metre;
  unit area = metre^2;
  unit volume = litre;
  unit time = second;
  unit substance = mole;
end
