// SBML level 3 version 1

model Model_layout()

  // Compartments:
  compartment _compartment_default_;
  compartment compartment;

  // Species:
  species $External_glucose in compartment = 0;
  species Glucose in compartment = 0;
  species ATP in compartment = 3;
  species fructose_1_6_bisphosphate in compartment = 0;
  species ADP in compartment = 1;
  species glyceraldehyde_3_phosphate in compartment = 0;
  species NADH in compartment = 0.5;
  species NAD in compartment = 0.5;
  species $Glycerol in compartment = 0;
  species glycerate_3_phosphate in compartment = 0;
  species pyruvate in compartment = 0;
  species Acetyladehyde in compartment = 0;
  species $ethanol in compartment = 0;
  species External_acetaldehyde in compartment = 0;
  species $Sink in compartment = 0;

  // Parameters:
  J0_inputFlux = 50;
  J1_k1 = 550;
  J1_Ki = 1;
  J1_n = 4;
  J2_J2_k = 9.8;
  J3_J3_k = 85.7;
  J4_kg = 323.8;
  J4_kp = 76411.1;
  J4_ka = 57823.1;
  J4_kk = 23.7;
  J5_J5_k = 80;
  J6_J6_k = 9.7;
  J7_J7_k = 2000;
  J8_J8_k1 = 375;
  J8_J8_k2 = 375;
  J9_J9_k = 28;
  J10_J10_k = 80;
  J2_k = 9.8;
  J3_k = 85.7;
  J5_k = 80;
  J6_k = 9.7;
  J7_k = 2000;
  J8_k1 = 375;
  J8_k2 = 375;
  J9_k = 28;
  J10_k = 80;

  // Reactions:
  J0: SpecRef_J0_rct0 $External_glucose -> SpecRef_J0_prd0 Glucose; J0_inputFlux;
  J1: SpecRef_J1_rct0 Glucose + 2 ATP -> SpecRef_J1_prd0 fructose_1_6_bisphosphate + 2 ADP; J1_k1*Glucose*ATP*(1/(1 + (ATP/J1_Ki)^J1_n));
  J2: SpecRef_J2_rct0 fructose_1_6_bisphosphate -> SpecRef_J2_prd0 glyceraldehyde_3_phosphate + SpecRef_J2_prd1 glyceraldehyde_3_phosphate; J2_J2_k*fructose_1_6_bisphosphate;
  J3: SpecRef_J3_rct0 glyceraldehyde_3_phosphate + SpecRef_J3_rct1 NADH -> SpecRef_J3_prd0 NAD + SpecRef_J3_prd1 $Glycerol; J3_J3_k*glyceraldehyde_3_phosphate*NADH;
  J4: SpecRef_J4_rct0 glyceraldehyde_3_phosphate + SpecRef_J4_rct1 ADP + SpecRef_J4_rct2 NAD -> SpecRef_J4_prd0 ATP + SpecRef_J4_prd1 glycerate_3_phosphate + SpecRef_J4_prd2 NADH; (J4_kg*J4_kp*glyceraldehyde_3_phosphate*NAD*ADP - J4_ka*J4_kk*glycerate_3_phosphate*ATP*NADH)/(J4_ka*NADH + J4_kp*ADP);
  J5: SpecRef_J5_rct0 glycerate_3_phosphate + SpecRef_J5_rct1 ADP -> SpecRef_J5_prd0 ATP + SpecRef_J5_prd1 pyruvate; J5_J5_k*glycerate_3_phosphate*ADP;
  J6: SpecRef_J6_rct0 pyruvate -> SpecRef_J6_prd0 Acetyladehyde; J6_J6_k*pyruvate;
  J7: SpecRef_J7_rct0 Acetyladehyde + SpecRef_J7_rct1 NADH -> SpecRef_J7_prd0 NAD + SpecRef_J7_prd1 $ethanol; J7_J7_k*Acetyladehyde*NADH;
  J8: SpecRef_J8_rct0 Acetyladehyde -> SpecRef_J8_prd0 External_acetaldehyde; J8_J8_k1*Acetyladehyde - J8_J8_k2*External_acetaldehyde;
  J9: SpecRef_J9_rct0 ATP -> SpecRef_J9_prd0 ADP; J9_J9_k*ATP;
  J10: SpecRef_J10_rct0 External_acetaldehyde -> SpecRef_J10_prd0 $Sink; J10_J10_k*External_acetaldehyde;
end
